// COMSOL Multiphysics 6.1.0.357 model "tube_inlet.mph"
// Outline of the model tree

Parameters
  inlet_velocity = 10[mm/s]
  length = 0.1[mm]
  viscosity = 1e-3[Pa*s]
  density = 1000[kg/m^3]
  inlet_pressure = 10[Pa]
  diameter = .01[mm]

Geometry
  geom1 "Geometry 1" (2D axisymmetric, length unit m)
    r1: Rectangle | size = {diameter/2, length}
    fin: Finalize "Form Union"

Physics
  spf: LaminarFlow on all domains
    dependent variable u = {u, v, w}
    fp1: FluidProperties (default) | rho_mat = userdef; rho = density; mu_mat = userdef; mu = viscosity
    init1: init "Initial Values 1" (default)
    axi1: AxialSymmetry (default)
    wallbc1: WallBC "Wall 1" (default)
    inl1: InletBoundary "Inlet 1" on boundaries 2 | U0in = inlet_velocity; p0 = inlet_pressure
    out1: OutletBoundary "Outlet 1" on boundaries 3

Mesh
  mesh1 "Mesh 1" (physics-controlled)
    size: MeshSizeDefault | table = cfd; hauto = 6

Studies
  std1 "Study 1"
    param: Parametric "Parametric Sweep" | pname = inlet_pressure; plistarr = 0.1,1,10,100; punit = Pa
    stat: Stationary

Solver configurations
  sol1 "Solution 1" (study std1)
    v1: Variables "Dependent Variables 1"
    s1: Stationary "Stationary Solver 1"
      p1: Parametric | pname = inlet_pressure; plistarr = 0.1,1,10,100; punit = Pa; pcontinuationmode = no
      fc1: FullyCoupled | linsolver = d1; initstep = 0.01; maxiter = 100
      d1: Direct "Direct, fluid flow variables (spf)" | linsolver = pardiso; pivotperturb = 1.0E-13

Datasets
  dset1: Solution | solution = sol1
  rev1: Revolve2D "Revolution 2D" | data = dset1; startangle = -90; revangle = 225
  cln1: CutLine2D | data = dset1; genpoints = {{0, 0}, {diameter/2, 0}}; genparadist = range(0,(length/10-0)/9,length/10)

Derived values
  int1: IntLine "Line Integration 1" on boundaries 3
    data = dset1
    table = tbl1
    expr = w
    unit = m^3/s
    descr = Volumetric flow rate
    intsurface = on

Tables
  tbl1: Table
    // Line Integration 1
    inlet_pressure (Pa) | Volumetric flow rate (m^3/s)
    0.1 | 2.46453e-10
    1 | 2.46482e-09
    10 | 2.46135e-08
    100 | 2.46527e-07

Plots
  pg1: PlotGroup2D "Velocity (spf)" | data = dset1
    surf1: Surface | expr = spf.U
  pg2: PlotGroup2D "Pressure (spf)" | data = dset1
    con1: Contour | expr = p; levelrounding = off
  pg3: PlotGroup3D "Velocity, 3D (spf)" | data = rev1
    surf1: Surface | expr = spf.U
  pg4: PlotGroup1D "Velocity Profile" | data = dset1
    lngr1: LineGraph | data = cln1; expr = spf.U; xdata = expr; xdataexpr = 2*r/diameter